# Уилкинсон Дж.Х., Райнш С. Справочник алгоритмов на языке Алгол. Линейная алгебра
#
# М.: Машиностроение, 1976. — 390 с.
#
# В книге приведены алгоритмы решения всех основных задач линейной алгебры, реализованные в виде процедур на языке Алгол-
#
# 60. Для специалистов по теории управления представляют интерес алгоритмы решения проблемы собственных значений для произвольных матриц
matVariation_(A, B) :=
    A2 ← vectorize(|A|)
    B2 ← vectorize(|B|)
    k ← max(B2)
    R ← vectorize((A2 - B2)/k)
    return R
matGonj(A) := vectorize(conj(A))
matModulus(A) := vectorize(|A|)
matMaxElem(A) := max(matModulus(A))
sin(3) = 0.14112
# page 37, (53)
normFrobenius(A) :=
    C ← matGonj(A)
    C_h ← transpose(C)
    res ← sqrt(tr(A*C_h))
    return res
distFrobenius(A, B) :=
    C ← A - B
    D ← C*matGonj(C)
    return sqrt(tr(D))
dFr(A, B) :=
    F ← distFrobenius(A, B)
    dA ← matMaxElem(A)
    dB ← matMaxElem(B)
    return F/matMaxElem(A - B)
nFr(A) :=
    F ← normFrobenius(A)
    return F/matMaxElem(A)
A53_o := [
    360360, 180180, 120120, 90090, 72072, 60060, 51480;
    180180, 120120, 90090, 72072, 60060, 51480, 45045;
    120120, 90090, 72072, 60060, 51480, 45045, 40040;
    90090, 72072, 60060, 51480, 45045, 40040, 36036;
    72072, 60060, 51480, 45045, 40040, 36036, 32760;
    60060, 51480, 45045, 40040, 36036, 32760, 30030;
    51480, 45045, 40040, 36036, 32760, 30030, 27720
]
Gilbert7 := A53_o
WRITEPRN("c:\Sci\tmp\linAlg\Wilkinson\Gilbert7.prn", Gilbert7)
minmax(M) :=
    R ← [min(M), max(M)]
    return R
B := READPRN("c:\Sci\tmp\linAlg\Wilkinson\Gilbert7.prn")  # error: Не удается открыть файл данных.
# https://math.stackexchange.com/questions/507742/distance-similarity-between-two-matrices
det_A53_o := 381614277072600
det_A53_o2 := 8.47353913*10^-2*2^52
# http://mathworld.wolfram.com/FrobeniusNorm.html
det_A53_o2 - det_A53_o = -388827
matVariation(A53_o, A53_o) =  # error: Эта переменная не определена.
det_A53 := |A53_o|
δ_A53 := |det_A53 - det_A53_o|/det_A53_o
δ_A53 = 5.28869e-10
invA53_t := (A53_o^-1)
invA53_t = [
    0.000135975, -0.0032634, 0.0244755, -0.0815851, 0.134615, -0.107692, 0.0333333;
    -0.0032634, 0.104429, -0.881119, 3.13287, -5.38462, 4.43077, -1.4;
    0.0244755, -0.881119, 7.93007, -29.3706, 51.9231, -43.6154, 14;
    -0.0815851, 3.13287, -29.3706, 111.888, -201.923, 172.308, -56;
    0.134615, -5.38462, 51.9231, -201.923, 370.192, -319.846, 105;
    -0.107692, 4.43077, -43.6154, 172.308, -319.846, 279.138, -92.4;
    0.0333333, -1.4, 14, -56, 105, -92.4, 30.8
]
invA53_o := [
    1.35971314283*10^-4, -3.26325113753*10^-3, 2.44740603295*10^-2, -8.15793917156*10^-2, 1.34604954657*10^-1, -1.07683294804*10^-1, 3.33303738787*10^-2;
    -3.26325113738*10^-3, 1.04422850066*10^-1, -8.81060620311*10^-1, 3.13264074649*10^0, -5.38420043660*10^0, 4.43041069058*10^0, -1.39988227277*10^0;
    2.44740603601*10^-2, -8.81060620282*10^-1, 7.92950934930*10^0, -2.93684512777*10^1, 5.19190848985*10^1, -4.36119354451*10^1, 1.39988675014*10^1;
    -8.15793917875*10^-2, 3.13264074692*10^0, -2.93684512768*10^1, 1.11879649598*10^2, -2.01907567907*10^2, 1.72294292794*10^2, -5.59956005457*10^1;
    1.34604954474*10^-1, -5.38420043662*10^0, 5.19190848981*10^1, -2.01907567906*10^2, 3.70163885040*10^2, -3.19821597912*10^2, 1.04991937762*10^2;
    -1.07683295031*10^-1, 4.43041069139*10^0, -4.36119354458*10^1, 1.72294292795*10^2, -3.19821597914*10^2, 2.79117246791*10^2, -9.23930348819*10^1;
    3.33303738252*10^-2, -1.39988227242*10^0, 1.39988675007*10^1, -5.59956005459*10^1, 1.04991937763*10^2, -9.23930348819*10^1, 3.07977132849*10^1
]
invA53_o - invA53_t = [
    -3.82174e-9, 1.52128e-7, -1.46416e-6, 5.68993e-6, -1.04301e-5, 9.01298e-6, -2.95948e-6;
    1.52128e-7, -6.05443e-6, 5.82614e-5, -0.000226389, 0.000414952, -0.000358544, 0.000117728;
    -1.46413e-6, 5.82615e-5, -0.000560586, 0.00217811, -0.00399206, 0.0034492, -0.00113251;
    5.68986e-6, -0.000226388, 0.00217812, -0.00846237, 0.0155092, -0.0133996, 0.00439949;
    -1.04303e-5, 0.000414952, -0.00399206, 0.0155092, -0.0284229, 0.0245562, -0.00806231;
    9.01275e-6, -0.000358543, 0.0034492, -0.0133996, 0.0245561, -0.0212149, 0.00696518;
    -2.95954e-6, 0.000117729, -0.00113251, 0.00439949, -0.00806231, 0.00696518, -0.00228673
]
normFrobenius(invA53_t) = 794.263
nFr(invA53_t) = 2.14554
normFrobenius(invA53_o) = 794.202
nFr(invA53_o) = 2.14554
invA53_o = [
    0.000135971, -0.00326325, 0.0244741, -0.0815794, 0.134605, -0.107683, 0.0333304;
    -0.00326325, 0.104423, -0.881061, 3.13264, -5.3842, 4.43041, -1.39988;
    0.0244741, -0.881061, 7.92951, -29.3685, 51.9191, -43.6119, 13.9989;
    -0.0815794, 3.13264, -29.3685, 111.88, -201.908, 172.294, -55.9956;
    0.134605, -5.3842, 51.9191, -201.908, 370.164, -319.822, 104.992;
    -0.107683, 4.43041, -43.6119, 172.294, -319.822, 279.117, -92.393;
    0.0333304, -1.39988, 13.9989, -55.9956, 104.992, -92.393, 30.7977
]
distFrobenius(invA53_t, invA53_o) = 0.0609546
dFr(invA53_t, invA53_o) = 2.14456
minmax(matVariation_(invA53_t, invA53_o)) = [1.03244e-11, 7.67847e-5]
mkVec_e(size, index) :=
    R[size - 1] ← 0
    R[index] ← 1
    return R
m1 := [2 + 3*1i, 1 - 4*1i; 3 + 4*1i, 5 + 6*1i]
m2 := m1*2
# page 49
b_p47_o := mkVec_e(7, 0)
b_p47_o = [1; 0; 0; 0; 0; 0; 0]
d_p47_o := [
    1.35975135069*10^-4;
    -3.26340327676*10^-3;
    2.44755247690*10^-2;
    -8.1585082940*10^-2;
    1.34615387384*10^-1;
    -1.07692310159*10^-1;
    3.33333341518*10^-2
]
matGonj(m1) = [2 - 3i, 1 + 4i; 3 - 4i, 5 - 6i]
d_p47_t := lsolve(A53_o, b_p47_o)
nFr(invA53_o) = 2.14554
tr(m1) = 7 + 9i
WRITEPRN("c:\Sci\tmp\linAlg\Wilkinson\d_p47_o.prn") := d_p47_o
matModulus(m1) = [3.60555, 4.12311; 5, 7.81025]
matMaxElem(m1) = 7.81025
transpose(d_p47_t) = [0.000135975, -0.0032634, 0.0244755, -0.0815851, 0.134615, -0.107692, 0.0333333]
normFrobenius(m1) = 10.7703
normFrobenius(m2) = 21.5407
normFrobenius(invA53_o) = 794.202
distFrobenius(m1, m2) = 6.9282
nFr(m1) = 1.379
matVariation_(d_p47_t, d_p47_o) = [6.48279e-12; -1.08305e-10; -2.26252e-9; -1.03719e-8; -2.11112e-8; -1.87824e-8; -6.22748e-9]
distFrobenius(m1*0.5, m2*0.5) = 3.4641
nFr(m2) = 1.379
dFr(m1, m2) = 0.887066
dFr(m1*2, m2*2) = 0.887066
distFrobenius(invA53_t, invA53_o) = 0.0609546
# page56??? | LU-разложение | LU decomposition
# https://en.wikipedia.org/wiki/LU_decomposition
dFr(invA53_t, invA53_o) = 2.14456
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M_forLU1 := [4, 3; 6, 3]
WRITEPRN("c:\Sci\tmp\linAlg\Wilkinson\M_p56_o.prn") := M_forLU1
__digToVec(d, Vec) :=
    n ← rows(Vec) - 1
    for i ∈ 0 .. n
        Vec[i] ← d
    return Vec
mkVecByDig(dig, size) :=
    n ← size - 1
    R[n] ← 0
    for i ∈ 0 .. n
        R[i] ← dig
    return R
lu(M_forLU1) = [0, 1, 1, 0, 6, 3; 1, 0, 0.666667, 1, 0, 1]
# page 61 Choleckij
genGdiag_A61 :=
    size ← 40
    R ← mkVecByDig(6, size)
    R[0] ← 5
    R[size - 1] ← 5
    return R
transpose(genGdiag_A61) = [
    5, 6, 6, 6, 6, 6, 6, 6, 6, 6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]
ftDiag_A61 :=
    size ← 40 - 1
    R ← mkVecByDig(-4, size)
    return R
transpose(ftDiag_A61) = [
    -4, -4, -4, -4, -4, -4, -4, -4, -4, -4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]
sdDiag_A61 :=
    size ← 40 - 2
    R ← mkVecByDig(1, size)
    return R
transpose(sdDiag_A61) = [
    1, 1, 1, 1, 1, 1, 1, 1, 1, 1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]
fillMatr(Vec, Funct, Matr) :=
    n ← rows(Vec) - 1
    for i ∈ 0 .. n
        indx ← Funct(i)
        for j ∈ 0 .. rows(indx) - 1
            r ← indx[j, 0]
            c ← indx[j, 1]
            Matr[r, c] ← Vec[i]
    return Matr
fFor_d0(i) := [i, i]
fFor_d2(i) := [i, i + 2; i + 2, i]
fFor_d1(i) := [i, i + 1; i + 1, i]
fFor_d3(i) := [i, i + 3; i + 3, i]
mk3DiagMatr(genDiag, ftDiag, sdDiag) :=
    n ← rows(genDiag) - 1
    R[n, n] ← 0
    R ← fillMatr(genDiag, fFor_d0, R)
    R ← fillMatr(ftDiag, fFor_d1, R)
    R ← fillMatr(sdDiag, fFor_d2, R)
    return R
A_p61_o := mk3DiagMatr(genGdiag_A61, ftDiag_A61, sdDiag_A61)
det_A_p61_o := 4.10400390*10^-1*2^12
det_A_p61_o = 1681
det_A_p61_t := |A_p61_o|
det_A_p61_t = 1681
A_p61_o =  # no stored result
d_A_p61 := |det_A_p61_t - det_A_p61_o|/det_A_p61_o
d_A_p61 = 1.5237e-9
b_p62 := mkVec_e(40, 0)
b_p62 = [
    1; 0; 0; 0; 0; 0; 0; 0; 0; 0
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]
WRITEPRN("c:\Sci\tmp\linAlg\Wilkinson\d_A_p61_o.prn") := det_A_p61_o
x_p62_t := lsolve(A_p61_o, b_p62)
x_p62_t = [
    13.1707; 25.3659; 36.6098; 46.9268; 56.3415; 64.878; 72.561; 79.4146; 85.4634; 90.7317
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]
x_p62_part1_o := [
    1.3170731707*10^1;
    2.5365853659*10^1;
    3.6609756098*10^1;
    4.6926829268*10^1;
    5.6341463415*10^1;
    6.4878048780*10^1;
    7.2560975610*10^1;
    7.9414634146*10^1;
    8.5463414634*10^1;
    9.0731707317*10^1;
    9.5243902439*10^1;
    9.9024390244*10^1;
    1.0209756098*10^2;
    1.0448780488*10^2;
    1.0621951220*10^2;
    1.0731707317*10^2;
    1.07804878049*10^2;
    1.0770731707*10^2;
    1.0704878049*10^2;
    1.0585365854*10^2
]
x_p62_part2_o := [
    1.0414634146*10^2;
    1.0195121951*10^2;
    9.9292682927*10^1;
    9.6195121951*10^1;
    9.2682926829*10^1;
    8.8780487805*10^1;
    8.4512195122*10^1;
    7.9902439024*10^1;
    7.4975609756*10^1;
    6.9756097561*10^1;
    6.4268292683*10^1;
    5.85365853659*10^1;
    5.2585365854*10^1;
    4.6439024390*10^1;
    4.0121951220*10^1;
    3.3658536585*10^1;
    2.7073170732*10^1;
    2.0390243902*10^1;
    1.3634146341*10^1;
    6.8292682927*10^0
]
x_p62_o := stack(x_p62_part1_o, x_p62_part2_o)
minmax(matVariation_(x_p62_o, x_p62_t)) = [-3.10178e-11, 4.57896e-11]
# page 88
size_p88 := 7
genGdiag_A_p88 :=
    R ← mkVecByDig(6, size_p88)
    R[0] ← 5
    R[size_p88 - 1] ← 5
    return R
ftDiag_A_p88 := mkVecByDig(-4, size_p88 - 1)
sdDiag_A_p88 := mkVecByDig(1, size_p88 - 2)
A_p88_o := mk3DiagMatr(genGdiag_A_p88, ftDiag_A_p88, sdDiag_A_p88)
A_p88_o = [
    5, -4, 1, 0, 0, 0, 0;
    -4, 6, -4, 1, 0, 0, 0;
    1, -4, 6, -4, 1, 0, 0;
    0, 1, -4, 6, -4, 1, 0;
    0, 0, 1, -4, 6, -4, 1;
    0, 0, 0, 1, -4, 6, -4;
    0, 0, 0, 0, 1, -4, 5
]
b_p88 := mkVec_e(size_p88, 4 - 1)
b_p88 = [0; 0; 0; 1; 0; 0; 0]
x_p88_t := lsolve(A_p88_o, b_p88)
x_p88_t = [4; 7.5; 10; 11; 10; 7.5; 4]
x_p88_o := [4.0; 7.5; 10.0; 11.0; 10.0; 7.5; 4.0]
minmax(matVariation_(x_p88_t, x_p88_o)) = [-1.04967e-15, 1.61487e-16]
# page104
b_p105 := mkVec_e(size_p88, 5 - 1)*360360
b_p105 = [0; 0; 0; 0; 360360; 0; 0]
x_p105_t := lsolve(Gilbert7, b_p105)
x_p105_t = [48510; -1940400; 18711000; -72765000; 133402500; -115259760; 37837800]
x_p105_o := [
    4.85100315047*10^4;
    -1.94040128440*10^6;
    1.87110125732*10^7;
    -7.27650495356*10^7;
    1.33402591837*10^8;
    -1.15259840116*10^8;
    3.78378265214*10^7
]
minmax(matVariation_(x_p105_t, x_p105_o)) = [-6.88947e-7, -2.36405e-10]
complMul_p105 := transpose([1 + 1i, 1 - 1i, 1 + 2i, 1 - 2i, 1 + 3i, 1 - 3i, 1 + 4i])
G7complex_p105 := Gilbert7*diag(complMul_p105)
det_p105_cmplx_t := |G7complex_p105|
G7complex_p105 = [
    360360 + 360360i, 180180 - 180180i, 120120 + 240240i, 90090 - 180180i, 72072 + 216216i, 60060 - 180180i, 51480 + 205920i;
    180180 + 180180i, 120120 - 120120i, 90090 + 180180i, 72072 - 144144i, 60060 + 180180i, 51480 - 154440i, 45045 + 180180i;
    120120 + 120120i, 90090 - 90090i, 72072 + 144144i, 60060 - 120120i, 51480 + 154440i, 45045 - 135135i, 40040 + 160160i;
    90090 + 90090i, 72072 - 72072i, 60060 + 120120i, 51480 - 102960i, 45045 + 135135i, 40040 - 120120i, 36036 + 144144i;
    72072 + 72072i, 60060 - 60060i, 51480 + 102960i, 45045 - 90090i, 40040 + 120120i, 36036 - 108108i, 32760 + 131040i;
    60060 + 60060i, 51480 - 51480i, 45045 + 90090i, 40040 - 80080i, 36036 + 108108i, 32760 - 98280i, 30030 + 120120i;
    51480 + 51480i, 45045 - 45045i, 40040 + 80080i, 36036 - 72072i, 32760 + 98280i, 30030 - 90090i, 27720 + 110880i
]
det_p105_cmplx_t = 3.81614e16 + 1.52646e17i
det_p105_cmplx_o := (3.30997622*10^-2 + 1i*1.32399048*10^-1)*2^60
det_p105_cmplx_o - det_p105_cmplx_t = -47192584 - 1124899424i
3.816*10^16 + 1.526i*10^17
lsolve(G7complex_p105, mkVec_e(size_p88, 0)) = [6.79876e-5 - 6.79876e-5i; -0.0016317 - 0.0016317i; 0.0048951 - 0.00979021i; -0.016317 - 0.032634i; 0.0134615 - 0.0403846i; -0.0107692 - 0.0323077i; 0.00196078 - 0.00784314i]
# ????????
# page 188
size_p188 := 44
genGdiag_B_p188 :=
    R ← mkVecByDig(6, size_p188)
    R[0] ← 5
    R[size_p188 - 1] ← 5
    return R
ftDiag_B_p188 :=
    R ← mkVecByDig(3, size_p188 - 1)
    R[0] ← 2
    R[size_p188 - 2] ← 2
    return R
sdDiag_B_p188 := mkVecByDig(1, size_p188 - 2)
trdDiag_B_p188 := mkVecByDig(1, size_p188 - 3)
mk4DiagMatr(genDiag, ftDiag, sdDiag, trdDiag) :=
    n ← rows(genDiag) - 1
    R[n, n] ← 0
    R ← fillMatr(genDiag, fFor_d0, R)
    R ← fillMatr(ftDiag, fFor_d1, R)
    R ← fillMatr(sdDiag, fFor_d2, R)
    R ← fillMatr(trdDiag, fFor_d3, R)
    return R
B_p188_o := mk4DiagMatr(genGdiag_B_p188, ftDiag_B_p188, sdDiag_B_p188, trdDiag_B_p188)
B_p188_o =  # no stored result
eigenval_B_p188_t := sort(eigenvals(B_p188_o))
eigenval_B_p188_t = [
    0.0388566; 0.153824; 0.340171; 0.590265; 0.893933; 1.23895; 1.61164; 1.99751; 2.38197; 2.75103
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]
eigenvec_for6 := eigenvec(B_p188_o, eigenval_B_p188_t[14])
B_p188_o - eigenval_B_p188_t[14]*identity(rows(B_p188_o)) =  # no stored result
eigenvec_for6 = [
    -0.182574; 0.182574; 0; -0.182574; 0.182574; 0; -0.182574; 0.182574; 0; -0.182574
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]
R188 :=
    n ← rows(B_p188_o)
    r[n - 1] ← 0
    return r
eigenval_B_p188_t[14] = 4
# page 200
B_p200 := [
    5, 1, -2, 0, -2, 5;
    1, 6, -3, 2, 0, 6;
    -2, -3, 8, -5, -6, 0;
    0, 2, -5, 5, 1, -2;
    -2, 0, -6, 1, 6, -3;
    5, 6, 0, -2, -3, 8
]
A_p200 := [10, 1, 2, 3, 4; 1, 9, -1, 2, -3; 2, -1, 7, 3, -5; 3, 2, 3, 12, -1; 4, -3, -5, -1, 15]
lsolve(B_p188_o - eigenval_B_p188_t[14]*identity(rows(B_p188_o)), R188) = [
    0; 0; 0; 0; 0; 0; 0; 0; 0; 0
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]
eigenvals_Ap200_t1 := eigenvals(A_p200)
eigenvals_Ap200_t1 = [1.65527; 6.99484; 9.36555; 15.8089; 19.1754]
vals_A_p200_o := [1.65526620792*10^0; 6.99483783061*10^0; 9.36555492014*10^0; 1.58089207644*10^1; 1.91754202773*10^1]
minmax(matVariation_(eigenvals_Ap200_t1, vals_A_p200_o)) = [-1.00564e-11, -4.95794e-13]
eigenvals_Bp200_t1 := eigenvals(B_p200)
eigenvals_Bp200_t1 = [-1.59873; -1.59873; 4.45599; 4.45599; 16.1427; 16.1427]
vals_B_p200_o := [
    -1.59873429360*10^0;
    -1.59873429360*10^0;
    4.45598963849*10^0;
    4.45598963849*10^0;
    1.61427446551*10^1;
    1.61427446551*10^1
]
minmax(matVariation_(eigenvals_Bp200_t1, vals_B_p200_o)) = [-1.89781e-12, 1.36252e-12]
eigenVecss_Ap200_t1 := eigenvecs(A_p200)
eigenVecss_Ap200_t1 = [
    -0.387297, -0.654083, 0.0521511, 0.623702, 0.174505;
    0.366221, -0.199681, -0.859964, 0.159101, -0.247303;
    0.704377, -0.25651, 0.505575, 0.227297, -0.361642;
    -0.118926, 0.660403, 0.000201167, 0.692684, -0.264411;
    0.453423, 0.17428, -0.0462192, 0.232822, 0.841244
]
vecs_A_p200_o[:, 0] := [
    3.87296874886*10^-1;
    -3.66221021131*10^-1;
    -7.04377266220*10^-1;
    1.18926222076*10^-1;
    -4.53423108037*10^-1
]
vecs_A_p200_o[:, 1] := [
    6.54082984085*10^-1;
    1.99681268959*10^-1;
    2.56510456336*10^-1;
    -6.60402722389*10^-1;
    -1.74279863500*10^-1
]
vecs_A_p200_o[:, 3] := [
    -6.23702499852*10^-1;
    -1.59101120870*10^-1;
    -2.27297494237*10^-1;
    -6.92684385756*10^-1;
    -2.32822283880*10^-1
]
vecs_A_p200_o[:, 2] := [
    5.21511178463*10^-2;
    -8.59963866689*10^-1;
    5.05575072575*10^-1;
    2.01166650650*10^-4;
    -4.62191996239*10^-2
]
vecs_A_p200_o[:, 4] := [
    1.74505109459*10^-1;
    -2.47302518851*10^-1;
    -3.61641739446*10^-1;
    -2.64410853099*10^-1;
    8.41244069212*10^-1
]
vecs_A_p200_o = [
    0.387297, 0.654083, 0.0521511, -0.623702, 0.174505;
    -0.366221, 0.199681, -0.859964, -0.159101, -0.247303;
    -0.704377, 0.25651, 0.505575, -0.227297, -0.361642;
    0.118926, -0.660403, 0.000201167, -0.692684, -0.264411;
    -0.453423, -0.17428, -0.0462192, -0.232822, 0.841244
]
normVec(v) :=
    return sum(vectorize(|v|))
VariationEigenVecs(A, B) :=
    n ← rows(A) - 1
    for i ∈ 0 .. n
        mult ← A[0, i]/B[0, i]
        R[:, i] ← A[:, i] - mult*B[:, i]
    return R
normVec(vecs_A_p200_o[:, 0]) = 2.03024
deltaEigenVecs_A_p200 := VariationEigenVecs(vecs_A_p200_o, eigenVecss_Ap200_t1)
deltaEigenVecs_A_p200 = [
    0, 0, 0, 0, 2.77556e-17;
    1.43924e-12, -1.55962e-11, -1.03483e-10, -6.50191e-12, 5.74121e-12;
    2.32692e-12, 1.02681e-11, 5.39644e-11, 3.32015e-12, 1.2425e-11;
    5.54531e-12, -1.22243e-11, 1.72204e-11, 1.10351e-11, 1.16355e-11;
    -2.71472e-12, -4.01137e-12, -2.55108e-12, 6.82418e-12, -1.91315e-11
]
minmax(deltaEigenVecs_A_p200) = [-1.03483e-10, 5.39644e-11]
eigenVecss_Bp200_t1 := eigenvecs(B_p200)  # ?????
eigenVecss_Bp200_t1 = [
    0.439571, 0.258576, -0.556732, 0.498668, -0.0754103, 0.419057;
    0.265477, 0.499197, 0.508699, -0.351872, -0.303554, 0.453421;
    0.621294, -0.185022, 0.224248, -0.0922161, 0.721782, 0;
    0.258576, -0.439571, 0.498668, 0.556732, -0.419057, -0.0754103;
    0.499197, -0.265477, -0.351872, -0.508699, -0.453421, -0.303554;
    -0.185022, -0.621294, -0.0922161, -0.224248, 0, 0.721782
]
eigenvals_Bp200_t1 = [-1.59873; -1.59873; 4.45599; 4.45599; 16.1427; 16.1427]  # ???????
vecs_B_p200_o[:, 0] := [□; □; □; □; □; □]  # error: Пустой местозаполнитель.
eigenvec(B_p200, eigenvals_Bp200_t1[1]) = [0.258526; -0.01056; 0.632915; 0.439601; 0.5653; 0.14021]
# page 227
genGdiag_A_p227 :=
    size ← 30
    for i ∈ 0 .. size - 1
        R[i] ← (i + 1)^4
    return R
ftDiag_A_p227 :=
    size ← 30 - 1
    for i ∈ 0 .. size - 1
        R[i] ← (i + 1) - 1
    return R
mkDiagMatr(genDiag, ftDiag) :=
    n ← rows(genDiag) - 1
    R[n, n] ← 0
    R ← fillMatr(genDiag, fFor_d0, R)
    R ← fillMatr(ftDiag, fFor_d1, R)
    return R
A_p227 := mkDiagMatr(genGdiag_A_p227, ftDiag_A_p227)
vals_A_p227_t := eigenvals(A_p227)
vals_A_p227_approx_o := genGdiag_A_p227
vals_A_p227_t = [1; 15.9846; 80.9925; 255.998; 625.001; 1296; 2401; 4096; 6561; 10000; 14641; 20736; 28561; 38416; 50625; 65536; 83521; 104976; 130321; 160000; 194481; 234256; 279841; 331776; 390625; 456976; 531441; 614656; 707281; 810000]
chole
minmax(matVariation_(vals_A_p227_t, vals_A_p227_approx_o)) = [-1.89937e-8, 9.42281e-9]
page_343
reA_p343 := [1, -1, 2; 0, 0, 2; 0, -1, 3]
imA_p343 := [1, -1, 2; 0, 1, 0; 0, 0, 1]
A_p343 := reA_p343 + 1i*imA_p343
A_p343 = [1 + 1i, -1 - 1i, 2 + 2i; 0, 1i, 2; 0, -1, 3 + 1i]
eigenvals(A_p343) = [1 + 1i; 1 + 1i; 2 + 1i]
eigenvecs(A_p343) = [
    1, -0.235702 - 0.235702i, 0.707107;
    0, 0.843274, 0.353553 - 0.353553i;
    0, 0.421637, 0.353553 - 0.353553i
]  # ?????
# page 362
